*HEADING
Abaqus Job Created By SimLab 2017.2 .
*******************************************************************************
****		Created at 21:7:36, September 14,2018
****		NODES= 189
****		ELEMENTS= 80
*******************************************************************************
**NSET COUNT = 189
*NODE,NSET=NALL
1,                1.00000,        1.00000,       20.00000
2,                1.00000,        0.00000,       20.00000
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**
**ELSET COUNT = 80
**HWCOLOR COMP          1     0
*ELEMENT, TYPE=C3D8, ELSET=Body1
         1,        64,        65,        68,        67,         1,         2,         5,
         4
         2,        65,        66,        69,        68,         2,         3,         6,
         5
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**
**NSET COUNT = 3
*NSET, NSET=BC1
         3,        66,       129,
**NSET COUNT = 3
*NSET, NSET=BC2
        63,       126,       189,
**ELSET COUNT = 40
*SURFACE,TYPE=ELEMENT,NAME=PRESSURE
79,S6
77,S6
75,S6
73,S6
71,S6
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1,S6
**
**Property Definitions
**
*SOLID SECTION, ELSET=Body1, MATERIAL=Material-1
**
**Edge Constraint BC1
**
*NSET, NSET=BC1
       126,        63,       189,
**
**Edge Constraint BC2
**
*NSET, NSET=BC2
        66,         3,       129,
**
**Pressure Name:PRESSURE
*SURFACE,TYPE=ELEMENT,NAME=PRESSURE
        57, S6
        77, S6
        55, S6
         9, S6
        75, S6
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        31, S6
*BOUNDARY
**Fixed constraints:BC1
BC1,	1
BC1,	2
BC1,	3
**
**Fixed constraints:BC2
BC2,	1
BC2,	2
**
*Step,inc=100
*Static
0.1,1.000000,0.1,0.1
*DSLOAD
PRESSURE,P,2.25000
**
** Output Requests
*output,field,Variable=ALL
*NODE FILE, FREQUENCY=99
U,V,RF,NT
*Restart, Write
*End Step
